Simulations: Version=160
  DataStore
  Folder Experiment1
    Experiment
      Factors
        Permutation
          Factor SowDate: Specification=[Field].Sow on a fixed date.Script.SowDate = 1-apr,1-may
          Factor Genotype
            Specification=[Field].Sow on a fixed date.Script.CultivarName = A_80, A_90
      Simulation ExperimentBase
        SoilArbitrator
        Weather
          FileName=C:\Users\drk8b9\Documents\GitHub\apsimxSimData\data\00.05_apsimx_sim_en_masse\power\-90.76036_34.72952_1984-01-01_2022-12-31.met
        Clock: Start=1984-01-01; End=2022-12-31
        Summary summaryfile
        Zone FIELD: Area=1; Slope=0; AspectAngle=0; Altitude=50
          SurfaceOrganicMatter: InitialResidueName=soybean; InitialResidueType=soybean; InitialResidueMass=1000; InitialStandingFraction=0; InitialCPR=0; InitialCNR=28
          Soil Nauvoo:523140: SoilType=Nauvoo:523140; State=AL; Country=USA; ApsoilNumber=0; Latitude=34.72952; Longitude=-86.5296
            DataSource=SSURGO (https://sdmdataaccess.nrcs.usda.gov/) through R package soilDB, R package apsimx function ssurgo2sp. Timestamp 2023-08-10 15:00:53
            Comments=cokey = 23480155 - acres percent = 85 - component percent = 85 - taxonomic classification name = Fine-loamy, siliceous, semiactive, thermic Typic Hapludults - drainage class = Well drained - elevation = 380 - slope = 8 - geomdesc = Side Slope
            Physical
              Thickness  ParticleSizeClay  ParticleSizeSand  ParticleSizeSilt  BD       AirDry     LL15      DUL       SAT       KS
              200        18                63                19                1.63121  0.0534951  0.10699   0.193638  0.384451  2419.2
              200        18                63                19                1.63121  0.0534951  0.10699   0.193638  0.384451  2419.2
              200        18                63                19                1.63121  0.0534951  0.10699   0.193638  0.384451  2419.2
              200        28                38                34                1.56144  0.16874    0.16874   0.297193  0.410779  777.6
              200        28                38                34                1.56144  0.16874    0.16874   0.297193  0.410779  777.6
              200        18                59                23                1.62957  0.107395   0.107395  0.201781  0.385069  777.6
              200        18                59                23                1.62957  0.107395   0.107395  0.201781  0.385069  777.6
              200        18                59                23                1.62957  0.107395   0.107395  0.201781  0.385069  777.6
              200        18                59                23                1.62957  0.107395   0.107395  0.201781  0.385069  43.2
              200        18                59                23                1.62957  0.107395   0.107395  0.201781  0.385069  43.2
              SoilCrop MaizeSoil
                LL=[0.10699, 0.10699, 0.10699, 0.16874, 0.16874, 0.107395, 0.107395, 0.107395, 0.107395, 0.107395]
                KL=[0.06, 0.0491238, 0.0402192, 0.0329287, 0.0269597, 0.0220728, 0.0180717, 0.0147958, 0.0121138, 0.00991793]
                XF=[1, 1, 1, 1, 1, 1, 1, 1, 1, 1]
                LL source: Estimated based on local knowledge
              SoilCrop SoybeanSoil: same as Experiment1.Experiment.ExperimentBase.FIELD.Nauvoo:523140.Physical.MaizeSoil
              SoilCrop WheatSoil: same as Experiment1.Experiment.ExperimentBase.FIELD.Nauvoo:523140.Physical.MaizeSoil
            WaterBalance SoilWater: SummerDate=1-jun; SummerU=8.8; SummerCona=3.9; WinterDate=1-nov; WinterU=8.8; WinterCona=3.9; DiffusConst=40; DiffusSlope=16; Salb=0.13; CN2Bare=73; CNRed=20; CNCov=0.8; PSIDul=-100; Thickness=[220, 220, 240, 240, 310, 310]; SWCON=[0.443, 0.443, 0.427, 0.427, 0.362, 0.362]
            CERESSoilTemperature Temperature
            Organic: FOMCNRatio=45; CarbonUnits=Total
              Thickness  Carbon    SoilCNRatio  FBiom       FInert    FOM
              200        0.726744  12           0.04        0.8       150
              200        0.726744  12           0.0327492   0.80804   122.81
              200        0.726744  12           0.0268128   0.816161  100.548
              200        0.436047  12           0.0219525   0.824364  82.3217
              200        0.436047  12           0.0179732   0.832649  67.3993
              200        0.145349  12           0.0147152   0.841017  55.1819
              200        0.145349  12           0.0120478   0.849469  45.1791
              200        0.145349  12           0.00986388  0.858007  36.9895
              200        0.145349  12           0.00807586  0.86663   30.2845
              200        0.145349  12           0.00661196  0.875339  24.7948
            Chemical: Thickness=[200, 200, 200, 200, 200, 200, 200, 200, 200, 200]; PH=[6.5, 6.5, 6.5, 6.5, 6.5, 6.5, 6.5, 6.5, 6.5, 6.5]; PHUnits=Water
              PH source: Estimated based on local knowledge
            Water: Thickness=[220, 220, 240, 240, 310, 310]; InitialValues=[0.305, 0.305, 0.292, 0.292, 0.289, 0.289]; InitialPAWmm=263.857; RelativeTo=LL15; FilledFromTop=true
            Nutrient
            Solute NO3: Thickness=[220, 220, 240, 240, 310, 310]; InitialValues=[3.78788, 2.65152, 1.60256, 1.28205, 0.444939, 0.222469]; InitialValuesUnits=ppm; WaterTableConcentration=0; D0=0; DepthConstant=0; MaxDepthSoluteAccessible=0; RunoffEffectivenessAtMovingSolute=0; MaxEffectiveRunoff=0
            Solute NH4: Thickness=[220, 220, 240, 240, 310, 310]; InitialValues=[1.89394, 1.51515, 0.961538, 0.641026, 0.222469, 0]; InitialValuesUnits=ppm; WaterTableConcentration=0; D0=0; DepthConstant=0; MaxDepthSoluteAccessible=0; RunoffEffectivenessAtMovingSolute=0; MaxEffectiveRunoff=0
            Solute Urea: Thickness=[220, 220, 240, 240, 310, 310]; InitialValues=[0, 0, 0, 0, 0, 0]; InitialValuesUnits=kg/ha; WaterTableConcentration=0; D0=0; DepthConstant=0; MaxDepthSoluteAccessible=0; RunoffEffectivenessAtMovingSolute=0; MaxEffectiveRunoff=0
          Fertiliser
          MicroClimate: a_interception=0; b_interception=1; c_interception=0; d_interception=0; SoilHeatFluxFraction=0.4; MinimumHeightDiffForNewLayer=0; NightInterceptionFraction=0.5; ReferenceHeight=2
          Plant maize: ResourceName=Maize
          Manager Sow on a fixed date
            Crop = [maize]
            SowDate = 1-May
            CultivarName = B_105
            SowingDepth = 50
            RowSpacing = 760
            Population = 8
```csharp
using APSIM.Shared.Utilities;
using Models.Utilities;
using Models.Soils;
using Models.PMF;
using Models.Core;
using System;

namespace Models
{
    [Serializable]
    public class Script : Model
    {
        [Link] Clock Clock;
        [Link] Fertiliser Fertiliser;
        [Link] Summary Summary;
        [Link] Soil Soil;
        
        [Description("Crop")]
        public IPlant Crop { get; set; }

        [Description("Sowing date (d-mmm)")]
        public string SowDate { get; set; }

        [Display(Type = DisplayType.CultivarName)]
        [Description("Cultivar to be sown")]
        public string CultivarName { get; set; }

        [Description("Sowing depth (mm)")]
        public double SowingDepth { get; set; }

        [Description("Row spacing (mm)")]
        public double RowSpacing { get; set; }

        [Description("Plant population (/m2)")]
        public double Population { get; set; }

        [EventSubscribe("DoManagement")]
        private void OnDoManagement(object sender, EventArgs e)
        {
            if (DateUtilities.WithinDates(SowDate, Clock.Today, SowDate))
            {
                Crop.Sow(population: Population, cultivar: CultivarName, depth: SowingDepth, rowSpacing: RowSpacing);    
            }
        }
    }
}
```
          Manager Fertilise at sowing
            Crop = [maize]
            FertiliserType = UreaN
            Amount = 0
```csharp
using Models.Soils;
using System;
using Models.Core;
using Models.PMF;
namespace Models
{
    [Serializable]
    public class Script : Model
    {
        [Link] Clock Clock;
        [Link] Fertiliser Fertiliser;
        
        [Description("Crop to be fertilised")]
        public IPlant Crop { get; set; }

        [Description("Type of fertiliser to apply? ")] 
        public Fertiliser.Types FertiliserType { get; set; }
    
        [Description("Amount of fertiliser to be applied (kg/ha)")]
        public double Amount { get; set; }
        
        [EventSubscribe("Sowing")]
        private void OnSowing(object sender, EventArgs e)
        {
            Model crop = sender as Model;
            if (Crop != null && crop.Name.ToLower() == (Crop as IModel).Name.ToLower())
                Fertiliser.Apply(Amount: Amount, Type: FertiliserType);
        }
    }
}
```
          Manager Harvesting
            Crop = [maize]
```csharp
using APSIM.Shared.Utilities;
using Models.Utilities;
using Models.Soils;
using Models.PMF;
using Models.Core;
using System;

namespace Models
{
    [Serializable] 
    public class Script : Model
    {
        [Description("Crop")]
        public IPlant Crop { get; set; }
        
        [EventSubscribe("DoManagement")]
        private void OnDoManagement(object sender, EventArgs e)
        {
            if (Crop.IsReadyForHarvesting)
            {
                Crop.Harvest();
                Crop.EndCrop();
            }
        }
    }
}
```
          Report
            VariableNames:
              [Clock].Today
              [Maize].AboveGround.Wt
              [Maize].LAI
              [Maize].Grain.Wt* 10 as yield_Kgha // can add in modifications
            EventNames:
              //[Clock].EndOfDay
              [Maize].Harvesting
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