Simulations: Version=160
  DataStore
  Folder Experiment1
    Experiment
      Factors
        Permutation
          Factor SowDate
            Specification=[Field].Sow on a fixed date.Script.SowDate = 20-Feb, 24-Feb, 28-Feb, 03-Mar, 07-Mar, 11-Mar, 15-Mar, 19-Mar, 23-Mar, 27-Mar, 31-Mar, 04-Apr, 08-Apr, 12-Apr, 16-Apr, 20-Apr, 24-Apr, 28-Apr, 02-May, 06-May, 10-May, 14-May, 18-May, 22-May, 26-May, 30-May, 03-Jun, 07-Jun, 11-Jun, 15-Jun, 19-Jun
          Factor Genotype
            Specification=[Field].Sow on a fixed date.Script.CultivarName = A_80, A_90, A_95, A_100, A_103, A_105, A_108, A_110, A_112, A_115, A_120, A_130, Atrium, B_80, B_90, B_95, B_100, B_103, B_105, B_108, B_110, B_112, B_115, B_120, B_130, CG4141, GH_5009, GH_5019WX, HY_110, Hycorn_40, Hycorn_53, Katumani, Laila, LY_110, Makueni, malawi_local, Melkassa, mh12, mh16, mh17, mh18, mh19, NSCM_41, P1197, Pioneer_3153, Pioneer_33M54, Pioneer_34K77, Pioneer_38H20, Pioneer_39G12, Pioneer_39V43, r201, r215, sc401, sc501, sc601, sc623, sc625, sr52
      Simulation ExperimentBase
        SoilArbitrator
        Weather: FileName=power\-86.5296_34.72952_2014-01-01_2014-12-31.met
        Clock: Start=1984-01-01; End=2022-12-31
        Summary summaryfile
        Zone FIELD: Area=1; Slope=0; AspectAngle=0; Altitude=50
          SurfaceOrganicMatter: InitialResidueName=soybean; InitialResidueType=soybean; InitialResidueMass=1000; InitialStandingFraction=0; InitialCPR=0; InitialCNR=28
          Soil Loam (Nicollet, No1): SoilType=Nicollet; Region=Story; State=Iowa; Country=US; ApsoilNumber=1; Latitude=42.049; Longitude=-93.4345
            DataSource:
              Original data by http://websoilsurvey.sc.egov.usda.gov/App/HomePage.htm
              Profile developed by Integrated Cropping Systems Lab, Department of Agronomy, ISU
            Comments:
              The Nicollet series consists of very deep, somewhat poorly drained soils that formed in calcareous loamy glacial till on till plains and moraines. Slopes range from 0 to 5 percent. Mean annual air temperature is about 9 degrees C (48 degrees F). Mean annual precipitation is about 660 mm (28 inches).
              TAXONOMIC CLASS: Fine-loamy, mixed, superactive, mesic Aquic Hapludolls
              TYPICAL PEDON: Nicollet clay loam on a 2 percent plane slope in a cultivated field. (Colors are for moist soil unless otherwise stated.)
              Ap--0 to 25 cm (0 to 10 inches); black (10YR 2/1) clay loam; weak fine subangular blocky structure; friable; about 2 percent gravel; slightly acid; abrupt smooth boundary. [18 to 28 cm (7 to 12 inches thick)]
              A--25 to 43 cm (10 to 17 inches); very dark gray (10YR 3/1) clay loam; moderate fine subangular blocky structure; friable; about 5 percent gravel; common black (10YR 2/1) worm casts; slightly acid; gradual irregular boundary. [8 to 38 cm (3 to 15 inches thick)]
              Bw--43 to 53 cm (17 to 21 inches); dark grayish brown (10YR 4/2) clay loam; moderate fine subangular blocky structure; friable; common very dark gray (10YR 3/1) worm casts; about 5 percent gravel; moderately acid; clear smooth boundary.
              Bg1--53 to 74 cm (21 to 29 inches); dark grayish brown (2.5Y 4/2) clay loam; moderate fine prismatic structure parting to moderate fine subangular blocky; friable; few very dark gray (10YR 3/1) worm casts; about 5 percent gravel; common fine distinct olive brown (2.5Y 4/4) Fe concentrations; moderately acid; abrupt wavy boundary.
              Bg2--74 to 84 cm (29 to 33 inches); dark grayish brown (2.5Y 4/2) clay loam; weak medium prismatic structure parting to moderate fine and medium subangular blocky; friable; few very dark gray (10YR 3/1) worm casts; about 5 percent gravel; few fine faint grayish brown (2.5Y 5/2) Fe depletions and a few fine distinct light olive brown (2.5Y 5/4) and prominent brown (7.5YR 5/4) Fe concentrations; slightly acid; abrupt wavy boundary. [Combined thickness of the B horizon is 15 to 51 cm (6 to 20 inches.)
              BCg--84 to 91 cm (33 to 36 inches); grayish brown (2.5Y 5/2) clay loam; weak fine and medium subangular blocky structure; friable; few very dark gray (10YR 3/1) worm casts; about 5 percent gravel; many fine distinct light olive brown (2.5Y 5/4) Fe concentrations; slightly effervescent in parts; slightly alkaline; abrupt wavy boundary.[0 to 20 cm (0 to 8 inches thick) ]
              BCkg--91 to 152 cm (36 to 60 inches); grayish brown (2.5Y 5/2) loam; massive in place breaking to angular fragments with greater horizontal than vertical dimensions; friable; about 5 percent gravel; common lime masses; many fine distinct light olive brown (2.5Y 5/4) and few fine prominent yellowish brown (10YR 5/8) Fe concentrations; few black (N 2/0) Fe-Mn concretions; strongly effervescent; slightly alkaline.
            Physical
              Thickness  ParticleSizeClay  ParticleSizeSand  ParticleSizeSilt  BD    AirDry  LL15   DUL    SAT    KS
              220        26                38                36                1.2   0.143   0.159  0.305  0.497  613.656
              220        26                38                36                1.2   0.159   0.159  0.305  0.497  613.656
              240        29                34                37                1.3   0.159   0.159  0.292  0.459  613.656
              240        29                34                37                1.3   0.159   0.159  0.292  0.459  613.656
              310        27                37                36                1.45  0.159   0.159  0.289  0.403  613.656
              310        27                37                36                1.45  0.159   0.159  0.289  0.403  613.656
              SoilCrop MaizeSoil: LL=[0.159, 0.159, 0.159, 0.159, 0.159, 0.159]; KL=[0.08, 0.072, 0.061, 0.052, 0.043, 0.035]; XF=[1, 1, 1, 1, 1, 1]
                LL source: Estimated based on local knowledge
              SoilCrop SoybeanSoil: same as Experiment1.Experiment.ExperimentBase.FIELD.Loam (Nicollet, No1).Physical.MaizeSoil
            WaterBalance SoilWater: SummerDate=1-jun; SummerU=8.8; SummerCona=3.9; WinterDate=1-nov; WinterU=8.8; WinterCona=3.9; DiffusConst=40; DiffusSlope=16; Salb=0.13; CN2Bare=73; CNRed=20; CNCov=0.8; PSIDul=-100; Thickness=[220, 220, 240, 240, 310, 310]; SWCON=[0.443, 0.443, 0.427, 0.427, 0.362, 0.362]
            CERESSoilTemperature Temperature
            Organic: FOMCNRatio=45; CarbonUnits=Total
              Thickness  Carbon    SoilCNRatio  FBiom     FInert  FOM
              220        3.19767   13           0.038875  0.406   395.014
              220        3.19767   13           0.01515   0.578   257.328
              240        0.436047  13           0.0106    0.76    161.228
              240        0.436047  13           0.01      0.8     101.017
              310        0.145349  13           0.01      0.8     55.2236
              310        0.145349  13           0.01      0.8576  30.1895
            Chemical: Thickness=[220, 220, 240, 240, 310, 310]; PH=[5.532, 5.532, 5.532, 5.532, 6.804, 6.804]; PHUnits=Water
              PH source: Estimated based on local knowledge
            Water: Thickness=[220, 220, 240, 240, 310, 310]; InitialValues=[0.305, 0.305, 0.292, 0.292, 0.289, 0.289]; InitialPAWmm=208.68; RelativeTo=LL15; FilledFromTop=true
            Nutrient
            Solute NO3: Thickness=[220, 220, 240, 240, 310, 310]; InitialValues=[3.78788, 2.65152, 1.60256, 1.28205, 0.444939, 0.222469]; InitialValuesUnits=ppm; WaterTableConcentration=0; D0=0; DepthConstant=0; MaxDepthSoluteAccessible=0; RunoffEffectivenessAtMovingSolute=0; MaxEffectiveRunoff=0
            Solute NH4: Thickness=[220, 220, 240, 240, 310, 310]; InitialValues=[1.89394, 1.51515, 0.961538, 0.641026, 0.222469, 0]; InitialValuesUnits=ppm; WaterTableConcentration=0; D0=0; DepthConstant=0; MaxDepthSoluteAccessible=0; RunoffEffectivenessAtMovingSolute=0; MaxEffectiveRunoff=0
            Solute Urea: Thickness=[220, 220, 240, 240, 310, 310]; InitialValues=[0, 0, 0, 0, 0, 0]; InitialValuesUnits=kg/ha; WaterTableConcentration=0; D0=0; DepthConstant=0; MaxDepthSoluteAccessible=0; RunoffEffectivenessAtMovingSolute=0; MaxEffectiveRunoff=0
          Fertiliser
          MicroClimate: a_interception=0; b_interception=1; c_interception=0; d_interception=0; SoilHeatFluxFraction=0.4; MinimumHeightDiffForNewLayer=0; NightInterceptionFraction=0.5; ReferenceHeight=2
          Plant maize: ResourceName=Maize
          Manager Sow on a fixed date
            Crop = [maize]
            SowDate = 1-May
            CultivarName = B_105
            SowingDepth = 50
            RowSpacing = 760
            Population = 8
```csharp
using APSIM.Shared.Utilities;
using Models.Utilities;
using Models.Soils;
using Models.PMF;
using Models.Core;
using System;

namespace Models
{
    [Serializable]
    public class Script : Model
    {
        [Link] Clock Clock;
        [Link] Fertiliser Fertiliser;
        [Link] Summary Summary;
        [Link] Soil Soil;
        
        [Description("Crop")]
        public IPlant Crop { get; set; }

        [Description("Sowing date (d-mmm)")]
        public string SowDate { get; set; }

        [Display(Type = DisplayType.CultivarName)]
        [Description("Cultivar to be sown")]
        public string CultivarName { get; set; }

        [Description("Sowing depth (mm)")]
        public double SowingDepth { get; set; }

        [Description("Row spacing (mm)")]
        public double RowSpacing { get; set; }

        [Description("Plant population (/m2)")]
        public double Population { get; set; }

        [EventSubscribe("DoManagement")]
        private void OnDoManagement(object sender, EventArgs e)
        {
            if (DateUtilities.WithinDates(SowDate, Clock.Today, SowDate))
            {
                Crop.Sow(population: Population, cultivar: CultivarName, depth: SowingDepth, rowSpacing: RowSpacing);    
            }
        }
    }
}
```
          Manager Fertilise at sowing
            Crop = [maize]
            FertiliserType = UreaN
            Amount = 0
```csharp
using Models.Soils;
using System;
using Models.Core;
using Models.PMF;
namespace Models
{
    [Serializable]
    public class Script : Model
    {
        [Link] Clock Clock;
        [Link] Fertiliser Fertiliser;
        
        [Description("Crop to be fertilised")]
        public IPlant Crop { get; set; }

        [Description("Type of fertiliser to apply? ")] 
        public Fertiliser.Types FertiliserType { get; set; }
    
        [Description("Amount of fertiliser to be applied (kg/ha)")]
        public double Amount { get; set; }
        
        [EventSubscribe("Sowing")]
        private void OnSowing(object sender, EventArgs e)
        {
            Model crop = sender as Model;
            if (Crop != null && crop.Name.ToLower() == (Crop as IModel).Name.ToLower())
                Fertiliser.Apply(Amount: Amount, Type: FertiliserType);
        }
    }
}
```
          Manager Harvesting
            Crop = [maize]
```csharp
using APSIM.Shared.Utilities;
using Models.Utilities;
using Models.Soils;
using Models.PMF;
using Models.Core;
using System;

namespace Models
{
    [Serializable] 
    public class Script : Model
    {
        [Description("Crop")]
        public IPlant Crop { get; set; }
        
        [EventSubscribe("DoManagement")]
        private void OnDoManagement(object sender, EventArgs e)
        {
            if (Crop.IsReadyForHarvesting)
            {
                Crop.Harvest();
                Crop.EndCrop();
            }
        }
    }
}
```
          Report
            VariableNames:
              [Clock].Today
              [Maize].AboveGround.Wt
              [Maize].LAI
              [Maize].Grain.Wt* 10 as yield_Kgha // can add in modifications
            EventNames:
              //[Clock].EndOfDay
              [Maize].Harvesting
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