Simulations: Version=160
  DataStore
  Folder Part I Environment
    Simulation Iowa
      SoilArbitrator
      Weather: FileName=Iowa_CC.met
      Clock: Start=1985-01-01; End=2021-12-31
      Summary summaryfile
      Zone FIELD: Area=1; Slope=0; AspectAngle=0; Altitude=50
        Fertiliser
        Plant soybean: ResourceName=Soybean
        SurfaceOrganicMatter: InitialResidueName=soybean; InitialResidueType=soybean; InitialResidueMass=1000; InitialStandingFraction=0; InitialCPR=0; InitialCNR=28
        MicroClimate: a_interception=0; b_interception=1; c_interception=0; d_interception=0; SoilHeatFluxFraction=0.4; MinimumHeightDiffForNewLayer=0; NightInterceptionFraction=0.5; ReferenceHeight=2
        Manager Sow on a fixed date
          Crop = [soybean]
          SowDate = 15-may
          CultivarName = Generic_MG2
          SowingDepth = 50
          RowSpacing = 750
          Population = 25
```csharp
using APSIM.Shared.Utilities;
using Models.Utilities;
using Models.Soils;
using Models.PMF;
using Models.Core;
using System;

namespace Models
{
    [Serializable]
    public class Script : Model
    {
        [Link] Clock Clock;
        [Link] Fertiliser Fertiliser;
        [Link] Summary Summary;
        [Link] Soil Soil;
        
        [Description("Crop")]
        public IPlant Crop { get; set; }

        [Description("Sowing date (d-mmm)")]
        public string SowDate { get; set; }

        [Display(Type = DisplayType.CultivarName)]
        [Description("Cultivar to be sown")]
        public string CultivarName { get; set; }

        [Description("Sowing depth (mm)")]
        public double SowingDepth { get; set; }

        [Description("Row spacing (mm)")]
        public double RowSpacing { get; set; }

        [Description("Plant population (/m2)")]
        public double Population { get; set; }

        [EventSubscribe("DoManagement")]
        private void OnDoManagement(object sender, EventArgs e)
        {
            if (DateUtilities.WithinDates(SowDate, Clock.Today, SowDate))
            {
                Crop.Sow(population: Population, cultivar: CultivarName, depth: SowingDepth, rowSpacing: RowSpacing);    
            }
        }
    }
}
```
        Manager Harvesting
          Crop = [soybean]
```csharp
using APSIM.Shared.Utilities;
using Models.Utilities;
using Models.Soils;
using Models.PMF;
using Models.Core;
using System;

namespace Models
{
    [Serializable] 
    public class Script : Model
    {
        [Description("Crop")]
        public IPlant Crop { get; set; }
        
        [EventSubscribe("DoManagement")]
        private void OnDoManagement(object sender, EventArgs e)
        {
            if (Crop.IsReadyForHarvesting)
            {
                Crop.Harvest();
                Crop.EndCrop();
            }
        }
    }
}
```
        Manager Harvest by min temp
          Crop = [soybean]
          Threshold = -2
          Days = 5
```csharp
using Models.Soils;
using System.Collections.Generic;
using System.Linq;
using System;
using Models.Core;
using Models.PMF;
using Models.Climate;
using Models.Utilities;
using APSIM.Shared.Utilities;

namespace Models
{
    [Serializable] 
    public class Script : Model
    {
        [Link] Weather weather;
        
        private List<double> accumulatedMinT = new List<double>();
        
        [Separator("Ends the crop and harvests if MinT drops below a threshold, or if the crop is ready for harvesting.")]
        [Description("Crop")]
        public IPlant Crop { get; set; }
        
        [Description("Mean minimum temperature theshold to force harvesting by (oC).")]
        public double Threshold { get; set; }
        
        [Description("Days to take mean MinT over: ")]
        public int Days { get; set; }
        
        
        [EventSubscribe("DoManagement")]
        private void OnDoManagement(object sender, EventArgs e)
        {
            accumulatedMinT.Add(weather.MinT);
            if (accumulatedMinT.Count > Days)
                accumulatedMinT.RemoveAt(0);

            if (Crop.IsReadyForHarvesting || 
                accumulatedMinT.Average()  < Threshold && Crop.IsAlive)
            {
                Crop.Harvest();
                Crop.EndCrop();
            }
        }
    }
}
```
        Manager Reset on date
          ResetDate = 1-Jan
          ResetWater = Yes
          ResetNutrients = Yes
          ResetSOM = Yes
```csharp
using Models.Soils.Nutrients;
using APSIM.Shared.Utilities;
using Models.Surface;
using Models.Utilities;
using Models.Soils.Nutrients;
using Models.Soils;
using Models.PMF;
using Models.Core;
using System;
using Models.Interfaces;

namespace Models
{
    [Serializable]
    public class Script : Model
    {
        [Link] private Clock Clock;
        [Link] private Plant Wheat;
        [Link] private ISoilWater SoilWater;
        [Link] private Nutrient nutrient;
        [Link] private SurfaceOrganicMatter SOM;
        [Link] private Summary Summary;

        [Description("Date to reset on:")]
        public string ResetDate {get;set;}

        [Description("Reset Water? (Yes or No)")]
        public string ResetWater {get;set;}

        [Description("Reset Soil Nutrients ? (Yes or No)")]
        public string ResetNutrients {get;set;}

        [Description("Reset Surface Organic Matter? (Yes or No)")]
        public string ResetSOM {get;set;}

        [EventSubscribe("DoManagement")]
        private void OnDoManagement(object sender, EventArgs e)
        {
            if (DateUtilities.WithinDates(ResetDate, Clock.Today, ResetDate))
            {
                if (ResetWater == "Yes")
                {
                    Summary.WriteMessage(this, "Reset Water", MessageType.Diagnostic);
                    SoilWater.Reset();
                }
                if (ResetNutrients == "Yes")
                {
                    Summary.WriteMessage(this, "Reset Nitrogen", MessageType.Diagnostic);
                    nutrient.Reset();
                }
                if (ResetSOM == "Yes")
                {
                    Summary.WriteMessage(this, "Reset Surface OM", MessageType.Diagnostic);
                    SOM.Reset();
                }
            }
        }
    }
}
```
        Soil Loam (Nicollet, No1): SoilType=Nicollet; Region=Story; State=Iowa; Country=US; ApsoilNumber=1; Latitude=42.049; Longitude=-93.4345
          DataSource:
            Original data by http://websoilsurvey.sc.egov.usda.gov/App/HomePage.htm
            Profile developed by Integrated Cropping Systems Lab, Department of Agronomy, ISU
          Comments:
            The Nicollet series consists of very deep, somewhat poorly drained soils that formed in calcareous loamy glacial till on till plains and moraines. Slopes range from 0 to 5 percent. Mean annual air temperature is about 9 degrees C (48 degrees F). Mean annual precipitation is about 660 mm (28 inches).
            TAXONOMIC CLASS: Fine-loamy, mixed, superactive, mesic Aquic Hapludolls
            TYPICAL PEDON: Nicollet clay loam on a 2 percent plane slope in a cultivated field. (Colors are for moist soil unless otherwise stated.)
            Ap--0 to 25 cm (0 to 10 inches); black (10YR 2/1) clay loam; weak fine subangular blocky structure; friable; about 2 percent gravel; slightly acid; abrupt smooth boundary. [18 to 28 cm (7 to 12 inches thick)]
            A--25 to 43 cm (10 to 17 inches); very dark gray (10YR 3/1) clay loam; moderate fine subangular blocky structure; friable; about 5 percent gravel; common black (10YR 2/1) worm casts; slightly acid; gradual irregular boundary. [8 to 38 cm (3 to 15 inches thick)]
            Bw--43 to 53 cm (17 to 21 inches); dark grayish brown (10YR 4/2) clay loam; moderate fine subangular blocky structure; friable; common very dark gray (10YR 3/1) worm casts; about 5 percent gravel; moderately acid; clear smooth boundary.
            Bg1--53 to 74 cm (21 to 29 inches); dark grayish brown (2.5Y 4/2) clay loam; moderate fine prismatic structure parting to moderate fine subangular blocky; friable; few very dark gray (10YR 3/1) worm casts; about 5 percent gravel; common fine distinct olive brown (2.5Y 4/4) Fe concentrations; moderately acid; abrupt wavy boundary.
            Bg2--74 to 84 cm (29 to 33 inches); dark grayish brown (2.5Y 4/2) clay loam; weak medium prismatic structure parting to moderate fine and medium subangular blocky; friable; few very dark gray (10YR 3/1) worm casts; about 5 percent gravel; few fine faint grayish brown (2.5Y 5/2) Fe depletions and a few fine distinct light olive brown (2.5Y 5/4) and prominent brown (7.5YR 5/4) Fe concentrations; slightly acid; abrupt wavy boundary. [Combined thickness of the B horizon is 15 to 51 cm (6 to 20 inches.)
            BCg--84 to 91 cm (33 to 36 inches); grayish brown (2.5Y 5/2) clay loam; weak fine and medium subangular blocky structure; friable; few very dark gray (10YR 3/1) worm casts; about 5 percent gravel; many fine distinct light olive brown (2.5Y 5/4) Fe concentrations; slightly effervescent in parts; slightly alkaline; abrupt wavy boundary.[0 to 20 cm (0 to 8 inches thick) ]
            BCkg--91 to 152 cm (36 to 60 inches); grayish brown (2.5Y 5/2) loam; massive in place breaking to angular fragments with greater horizontal than vertical dimensions; friable; about 5 percent gravel; common lime masses; many fine distinct light olive brown (2.5Y 5/4) and few fine prominent yellowish brown (10YR 5/8) Fe concentrations; few black (N 2/0) Fe-Mn concretions; strongly effervescent; slightly alkaline.
          Physical
            Thickness  ParticleSizeClay  ParticleSizeSand  ParticleSizeSilt  BD    AirDry  LL15   DUL    SAT       KS
            220        26                38                36                1.2   0.1431  0.159  0.305  0.49717   613.656
            220        26                38                36                1.2   0.159   0.159  0.305  0.49717   613.656
            240        29                34                37                1.3   0.159   0.159  0.292  0.459434  613.656
            240        29                34                37                1.3   0.159   0.159  0.292  0.459434  613.656
            310        27                37                36                1.45  0.159   0.159  0.289  0.40283   613.656
            310        27                37                36                1.45  0.159   0.159  0.289  0.40283   613.656
            SoilCrop MaizeSoil
              LL=[0.159, 0.159, 0.159, 0.159, 0.159, 0.159]
              KL=[0.08, 0.0718126, 0.0612405, 0.0517699, 0.0427795, 0.0345552]
              XF=[1, 1, 1, 1, 1, 1]
              LL source: Estimated based on local knowledge
            SoilCrop SoybeanSoil: same as Part I Environment.Iowa.FIELD.Loam (Nicollet, No1).Physical.MaizeSoil
          WaterBalance SoilWater: SummerDate=1-jun; SummerU=8.8; SummerCona=3.9; WinterDate=1-nov; WinterU=8.8; WinterCona=3.9; DiffusConst=40; DiffusSlope=16; Salb=0.13; CN2Bare=73; CNRed=20; CNCov=0.8; PSIDul=-100; Thickness=[220, 220, 240, 240, 310, 310]
            SWCON=[0.442586, 0.442586, 0.426815, 0.426815, 0.361792, 0.361792]
          CERESSoilTemperature Temperature
          Organic: FOMCNRatio=45; CarbonUnits=Total
            Thickness  Carbon    SoilCNRatio  FBiom     FInert  FOM
            220        3.19767   13           0.038875  0.406   395.014
            220        3.19767   13           0.01515   0.578   257.328
            240        0.436047  13           0.0106    0.76    161.228
            240        0.436047  13           0.01      0.8     101.017
            310        0.145349  13           0.01      0.8     55.2236
            310        0.145349  13           0.01      0.8576  30.1895
          Chemical: Thickness=[220, 220, 240, 240, 310, 310]; PH=[5.532, 5.532, 5.532, 5.532, 6.804, 6.804]; PHUnits=Water
            PH source: Estimated based on local knowledge
          Water: Thickness=[220, 220, 240, 240, 310, 310]; InitialValues=[0.305, 0.305, 0.292, 0.292, 0.289, 0.289]; InitialPAWmm=208.68; RelativeTo=LL15; FilledFromTop=true
          Nutrient
          Solute NO3: Thickness=[220, 220, 240, 240, 310, 310]; InitialValues=[3.78788, 2.65152, 1.60256, 1.28205, 0.444939, 0.222469]; InitialValuesUnits=ppm; WaterTableConcentration=0; D0=0; DepthConstant=0; MaxDepthSoluteAccessible=0; RunoffEffectivenessAtMovingSolute=0; MaxEffectiveRunoff=0
          Solute NH4: Thickness=[220, 220, 240, 240, 310, 310]; InitialValues=[1.89394, 1.51515, 0.961538, 0.641026, 0.222469, 0]; InitialValuesUnits=ppm; WaterTableConcentration=0; D0=0; DepthConstant=0; MaxDepthSoluteAccessible=0; RunoffEffectivenessAtMovingSolute=0; MaxEffectiveRunoff=0
          Solute Urea: Thickness=[220, 220, 240, 240, 310, 310]; InitialValues=[0, 0, 0, 0, 0, 0]; InitialValuesUnits=kg/ha; WaterTableConcentration=0; D0=0; DepthConstant=0; MaxDepthSoluteAccessible=0; RunoffEffectivenessAtMovingSolute=0; MaxEffectiveRunoff=0
        Report: EventNames=[Soybean].Harvesting
          VariableNames:
            [Clock].Today
            [Clock].Today.Year
            [Soybean].Grain.Wt*10 as yield
            [Soybean].AboveGround.Wt*10 as biomass
            [Soybean].Grain.Wt*10*0.0149/0.87 as soy_buac
            [Soybean].Phenology.EmergenceDAS
            [Soybean].Phenology.FloweringDAS
            [Soybean].Phenology.Stage
  Folder Part II Environment x Genotype
    Experiment Env_Gen
      Factors
        Permutation
          Factor Environment: Specification=[Weather]
            Weather IA: FileName=Iowa_CC.met
            Weather MO: FileName=Missouri.met
            Weather MN: FileName=Minnesota.met
          Factor Genotype
            Specification=[Field].Sow on a fixed date.Script.CultivarName = Generic_MG00, Generic_MG0, Generic_MG1, Generic_MG2, Generic_MG3, Generic_MG4, Generic_MG5, Generic_MG6, Generic_MG7, Generic_MG8, Generic_MG9
      Simulation Base
        SoilArbitrator
        Weather: FileName=Iowa_CE.met
        Clock: Start=1985-01-01; End=2021-12-31
        Summary summaryfile
        Zone FIELD: same as Part I Environment.Iowa.FIELD
  Folder Part III Envir x Gen x Management
    Experiment Env_Gen_Man
      Factors
        Permutation
          Factor Environment: same as Part II Environment x Genotype.Env_Gen.Factors.Permutation.Environment
          Factor Genotype
            Specification=[Field].Sow on a fixed date.Script.CultivarName = Generic_MG00, Generic_MG0, Generic_MG1, Generic_MG2, Generic_MG3, Generic_MG4, Generic_MG5, Generic_MG6, Generic_MG7, Generic_MG8, Generic_MG9
          Factor Management
            Specification=[Field].Sow on a fixed date.Script.SowDate = 1-apr,15-apr,1-may,15-may, 1-jun, 15-jun,1-jul,15-jul
      Simulation Base2
        SoilArbitrator
        Weather: FileName=South Dakota.met
        Clock: Start=1985-01-01; End=2021-12-31
        Summary summaryfile
        Zone FIELD: same as Part I Environment.Iowa.FIELD
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